// COMSOL Multiphysics 6.1.0.252 model "弹流润滑-0425.mph"
// Outline of the model tree

Parameters
  U = 0.2[m/s]  // 卷吸速度
  R0 = 0.01[m]  // 球半径
  F = 4[N]  // 总载荷
  eta0 = 0.036[Pa*s]  // 环境压力下的粘度
  alpha = 2e-8[1/Pa]  // 粘压系数
  p0 = 1.96e8[Pa]  // Roelands常数
  z_roe = alpha*p0/(log(eta0)+9.67)  // Roelands指数
  Eeff = 205[GPa]  // 弹性模量
  nu = 0.28  // 泊松比
  rho = 804[kg/m^3]  // 润滑油密度
  h_init = 200e-9[m]  // 初始中心膜厚预估值
  lf = 0.001  // 载荷因子（辅助扫描用）
  h0 = 200e-9[m]  // 初始膜厚

Variables
  var1 "变量 1"
    h_geo = r^2 / (2*R0)  // 球的圆弧形状
    w_def = w  // 固体的位移
    p_eff = max(tff.p, 0)  // 截断压力，防止负压
    h = h0 + h_geo+w_def  // 膜厚

Couplings
  intop1: Integration "积分 1" on boundaries 2 | axisym = on

Geometry
  geom1 "几何 1" (2D axisymmetric, length unit m)
    r1: Rectangle "矩形 1" | size = {0.005, 0.002}
    fin: Finalize "形成联合体"

Materials
  mat1: Common "Steel AISI 4340" on all domains
    def "Basic"
      relpermeability = 1
      electricconductivity = 4.032e6[S/m]
      thermalexpansioncoefficient = 12.3e-6[1/K]
      heatcapacity = 475[J/(kg*K)]
      relpermittivity = 1
      density = 7850[kg/m^3]
      thermalconductivity = 44.5[W/(m*K)]
    Enu "Young's modulus and Poisson's ratio"
      E = 205[GPa]
      nu = 0.28

Physics
  solid: SolidMechanics "固体力学" on all domains
    dependent variable u = {u, v, w}
    lemm1: LinearElasticModel "线弹性材料 1" (default)
    axi1: AxialSymmetrySolid "轴对称 1" (default)
    free1: Free "自由 1" (default)
    init1: init "初始值 1" (default)
    bndl1: BoundaryLoad "边界载荷 1" on boundaries 2 | LoadType = FollowerPressure; FollowerPressure = tff.p
    fix1: Fixed "固定约束 1" on boundaries 3
  tff: ThinFilmFlowEdge "薄膜流动" on boundaries 2
    dependent variable pfilm
    ffp1: FluidFilmProperties "流体膜属性 1" (default)
      hw1 = h0 + h_geo+w_def
      TangentialWallVelocity = userdef
      vw = {U, 0, 0}
      uw = {0, 0, 0}
      mure_mat = userdef
      mure = eta0*exp((log(eta0)+9.67)*(-1+(1+max(tff.p,0)/p0)^z_roe))
      rho_mat = userdef
      rho = 804[kg/m^3]
      minput_temperature = 298.15[K]
    axi1: AxialSymmetry "轴对称 1" (default)
    bdr1: Border "边界 1" (default)
    init1: init "初始值 1" (default)
    ge1: GlobalEquations "全局方程 1"
      name = h0
      equation = intop1(tff.p*2*pi*r) - F*lf
      initialValueU = 200e-9
      valueType = complex
      DependentVariableQuantity = length
      CustomDependentVariableUnit = m
      SourceTermQuantity = force
      CustomSourceTermUnit = 1
    out1: Outlet "出口 1" on points 3 | OutletCondition = Pressure

Mesh
  mesh1 "网格 1"
    size: MeshSizeDefault "大小" | hauto = 2
    ftri1: FreeTri "自由三角形网格 1" on remaining entities
      dis1: Distribution "分布 1" on boundaries 2 | type = predefined; reverse = on; elemcount = 450; elemratio = 6

Studies
  std1 "研究 1"
    stat: Stationary "稳态"

Solver configurations
  sol1 "解 1" (study std1)
    v1: Variables "因变量 1"
    s1: Stationary "稳态求解器 1"
      dDef: Direct "直接"
      fc1: FullyCoupled "全耦合 1" | linsolver = dDef

Datasets
  dset1: Solution | solution = sol1
  dset1solidrev: Revolve2D "二维旋转" | data = dset1; startangle = -90; revangle = 225
  rev1: Revolve2D "Revolution 2D" | data = dset1

Plots
  pg1: PlotGroup2D "应力 (solid)" | data = dset1
    surf1: Surface "表面 1" | expr = solid.mises
      def: Deform "变形" | expr = {u, w}; descr = 位移场
  pg2: PlotGroup3D "应力, 3D (solid)" | data = dset1solidrev
    surf1: Surface "表面 1" | expr = solid.mises
      def: Deform "变形" | revcoordsys = cylindrical; expr = {u, v, w}; descr = 位移场
  pg3: PlotGroup3D "流体压力 (tff)" | data = rev1
    surf1: Surface "表面 1" | expr = pfilm; unit = GPa
  pg7: PlotGroup3D "流体膜厚（h）" | data = rev1
    surf1: Surface "表面 1" | expr = h; unit = nm
  pg8: PlotGroup3D "流体速度（tff.Uave）" | data = dset1solidrev
    surf1: Surface "表面 1" | expr = tff.Uave
  pg4: PlotGroup1D "一维膜厚" | data = dset1
    lngr1: LineGraph "膜厚" on boundaries 2 | expr = h; unit = nm
  pg5: PlotGroup1D "一维压力" | data = dset1
    lngr1: LineGraph "压力" on boundaries 2 | expr = tff.p; unit = GPa
  pg6: PlotGroup1D "一维速度" | data = dset1
    lngr1: LineGraph "速度" on boundaries 2 | expr = tff.Uave; unit = m/s; descr = 平均流速大小（材料坐标系）