// COMSOL Multiphysics 6.1.0.252 model "TEHL-0525.mph"
// Outline of the model tree

Parameters
  U = 0.2[m/s]  // 卷吸速度
  R0 = 0.01[m]  // 球半径
  F = 4[N]  // 总载荷
  eta0 = 0.036[Pa*s]  // 环境压力下的粘度
  alpha = 2e-8[1/Pa]  // 粘压系数
  p0 = 1.96e8[Pa]  // Roelands常数
  z_roe = alpha*p0/(log(eta0)+9.67)  // Roelands指数
  Eeff = 205[GPa]  // 弹性模量
  nu = 0.3  // 泊松比
  rhof = 804[kg/m^3]  // 润滑油密度
  h_init = 200e-9[m]  // 初始中心膜厚预估值
  lf = 0.001  // 载荷因子（辅助扫描用）
  h0 = 200e-9[m]  // 初始膜厚
  ks = 45[W/(m*K)]  // 固体导热系数
  cps = 470[J/(kg*K)]  // 固体比热容
  rhos = 7850[kg/m^3]  // 固体密度
  kf = 0.14[W/(m*K)]  // 润滑油导热系数
  cpf = 2000[J/(kg*K)]  // 润滑油比热容
  T0 = 298.15[K]  // 环境基准温度
  beta_temp = 0.04[1/K]  // 润滑油粘温系数
  tc = 0  // 温度耦合因子

Variables
  var1 "变量 1"
    h_geo = r^2 / (2*R0)  // 球的圆弧形状
    w_def = w  // 固体的位移
    p_eff = max(tff.p, 0)  // 截断压力，防止负压
    h = h0 + h_geo+w_def  // 膜厚

Couplings
  intop1: Integration "积分 1" on boundaries 2 | axisym = on

Geometry
  geom1 "几何 1" (2D axisymmetric, length unit m)
    r1: Rectangle "矩形 1" | size = {0.005, 0.002}
    fin: Finalize "形成联合体"

Materials
  mat1: Common "Steel AISI 4340" on all domains
    def "Basic"
      relpermeability = 1
      electricconductivity = 4.032e6[S/m]
      thermalexpansioncoefficient = 12.3e-6[1/K]
      heatcapacity = 475[J/(kg*K)]
      relpermittivity = 1
      density = 7850[kg/m^3]
      thermalconductivity = 46[W/(m*K)]
    Enu "Young's modulus and Poisson's ratio"
      E = 205[GPa]
      nu = 0.3

Physics
  ht: HeatTransfer "固体传热" on all domains
    dependent variable T
    PhysicalModelProperty.Tref = 298.15[K]
    solid1: SolidHeatTransferModel "固体 1" (default)
    init1: init "初始值 1" (default) | Tinit = 298.15[K]
    axi1: AxialSymmetry "轴对称 1" (default)
    ins1: ThermalInsulation "热绝缘 1" (default)
    solidtrm1: SolidWithTranslationalMotion "具有平移运动的实体 1" on domains 1
      trm1: TranslationalMotion "平移运动 1" (default) | u = {0.1, 0, 0}
    hf1: HeatFluxBoundary "热通量 1" on boundaries 3, 4 | HeatFluxType = ConvectiveHeatFlux; h = 50; Text = 298.15[K]
    bhs1: BoundaryHeatSource "边界热源 1" on boundaries 2 | Qb_input = 20
  solid: SolidMechanics "固体力学" on all domains
    dependent variable u = {u, v, w}
    lemm1: LinearElasticModel "线弹性材料 1" (default)
    axi1: AxialSymmetrySolid "轴对称 1" (default)
    free1: Free "自由 1" (default)
    init1: init "初始值 1" (default)
    bndl1: BoundaryLoad "边界载荷 1" on boundaries 2 | LoadType = FollowerPressure; FollowerPressure = tff.p
    fix1: Fixed "固定约束 1" on boundaries 3
  tff: ThinFilmFlowEdge "薄膜流动" on boundaries 2
    dependent variable pfilm
    ffp1: FluidFilmProperties "流体膜属性 1" (default)
      hw1 = h0 + h_geo+w_def
      TangentialWallVelocity = userdef
      vw = {U, 0, 0}
      mure_mat = userdef
      mure = 0.036[Pa*s]
      rho_mat = userdef
      rho = 804[kg/m^3]
      minput_temperature = 298.15[K]
    axi1: AxialSymmetry "轴对称 1" (default)
    bdr1: Border "边界 1" (default)
    init1: init "初始值 1" (default)
    out1: Outlet "出口 1" on points 3 | OutletCondition = Pressure
    ge1: GlobalEquations "全局方程 1"
      name = h0
      equation = intop1(tff.p*2*pi*r) - F*lf
      initialValueU = 200e-9
      initialValueUt = 0
      valueType = complex
      DependentVariableQuantity = length
      CustomDependentVariableUnit = m
      SourceTermQuantity = force
      CustomSourceTermUnit = m

Mesh
  mesh1 "网格 1"
    size: MeshSizeDefault "大小" | hmax = 3.35E-4; hmin = 1.5E-6; hcurve = 0.3; hgrad = 1.3
    ftri1: FreeTri "自由三角形网格 1" on remaining entities
      dis1: Distribution "分布 1" on boundaries 2
        type = predefined
        reverse = on
        elemcount = 200
        elemratio = 5
        growthrate = exponential
        symmetric = on

Studies
  std1 "研究 1"
    stat: Stationary "稳态"

Solver configurations
  sol1 "解 1" (study std1)
    v1: Variables "因变量 1"
    s1: Stationary "稳态求解器 1"
      fc1: FullyCoupled "全耦合 1" | linsolver = d1; initstep = 0.01; minstep = 1.0E-6; maxiter = 50
      d1: Direct "直接，传热变量 (ht) (已合并)" | pivotperturb = 1.0E-13

Datasets
  dset1: Solution | solution = sol1
  rev1: Revolve2D "二维旋转" | data = dset1; startangle = -90; revangle = 225
  dset1solidrev: Revolve2D "二维旋转 2" | data = dset1; startangle = -90; revangle = 225
  rev2: Revolve2D "Revolution 2D" | data = dset1

Plots
  pg1: PlotGroup3D "三维温度 (ht)" | data = rev1
    surf1: Surface "表面" | expr = T
  pg2: PlotGroup2D "等温线 (ht)" | data = dset1; dataisaxisym = on
    con1: Contour "等值线" | expr = T; levelrounding = off
  pg3: PlotGroup2D "应力 (solid)" | data = dset1
    surf1: Surface "表面 1" | expr = solid.mises
      def: Deform "变形" | expr = {u, w}; descr = 位移场
  pg4: PlotGroup3D "应力, 3D (solid)" | data = dset1solidrev
    surf1: Surface "表面 1" | expr = solid.mises
      def: Deform "变形" | revcoordsys = cylindrical; expr = {u, v, w}; descr = 位移场
  pg5: PlotGroup3D "流体压力 (tff)" | data = rev2
    surf1: Surface "表面 1" | expr = pfilm